OpenVSP model (file version 5), 3 components.
Geometry view with OpenVSP parameter names; values to 6 digits, angles in degrees, lengths in the model's unit.
Overall bounding box: X_Min=-0.582975 X_Len=0.77735 Y_Min=-5.01004 Y_Len=10.0201 Z_Min=-0.77578 Z_Len=1.55156

Propeller "PropGeom"
  location (X Y Z) 0 0 0, rotation 0 0 0
  bounding box size 0.47889 10.0201 1.55156
  Design: Diameter=10 NumBlade=2 Beta34=8.65774 UseBeta34Flag=1 Feather=0.192148 Rotate=0 Precone=0 ReverseFlag=0 FoldAngle=0 PropMode=0 AF=95.2803 CLi=0.546481 Chord=0.169763 Solidity=0.108074 ConstructXoC=0.5 FeatherAxisXoC=0.5 FeatherOffsetXoC=0
  cross sections:
    n  RadiusFrac  shape
    0  0.01        CST airfoil Chord=0.54 ContLERad=0 LowDegree=7 ThickChord=0.250703 UpDegree=7 Au=[0.32826 0.19914 0.42487 0.64286 0.0338 0.57765 0.44448 0.990201] Al=[-0.112868 -0.211019 -0.0780666 -0.0879829 -0.925253 0.172618 -0.477986 -0.599733]
    1  0.0719314   CST airfoil Chord=0.721063 ContLERad=0 LowDegree=7 ThickChord=0.250703 UpDegree=7 Au=[0.32826 0.19914 0.42487 0.64286 0.0338 0.57765 0.44448 0.990201] Al=[-0.112868 -0.211019 -0.0780666 -0.0879829 -0.925253 0.172618 -0.477986 -0.599733]
    2  0.14098     CST airfoil Chord=1.06185 ContLERad=0 LowDegree=7 ThickChord=0.138441 UpDegree=7 Au=[0.227634 0.366637 -0.105349 0.939557 -0.698644 1.33198 -0.431747 1.23615] Al=[-0.112051 -0.126697 0.0507126 -0.223471 -0.0772735 -0.0951959 -0.248397 -0.569531]
    3  0.215783    CST airfoil Chord=1.30793 ContLERad=0 LowDegree=7 ThickChord=0.0639847 UpDegree=7 Au=[0.15277 0.486177 -0.389889 1.20488 -0.947345 1.29942 -0.439446 0.81417] Al=[-0.0125477 0.0428637 0.0728935 0.0808178 0.0340724 0.12579 0.104875 -0.0734246]
    4  0.359635    CST airfoil Chord=1.13354 ContLERad=0 LowDegree=7 ThickChord=0.0573654 UpDegree=7 Au=[0.108043 0.447049 -0.343845 1.0548 -0.821295 1.10082 -0.372564 0.640669] Al=[-0.124909 0.193853 -0.168498 0.361312 -0.234456 0.310164 0.0309992 0.0941743]
    5  0.503487    CST airfoil Chord=0.919174 ContLERad=0 LowDegree=7 ThickChord=0.0570133 UpDegree=7 Au=[0.124452 0.397897 -0.225986 0.822996 -0.500018 0.746492 -0.0986518 0.396069] Al=[-0.135929 0.230223 -0.219222 0.365283 -0.153692 0.129006 0.201571 -0.103864]
    6  0.647339    CST airfoil Chord=0.738756 ContLERad=0 LowDegree=7 ThickChord=0.0575253 UpDegree=7 Au=[0.117834 0.440436 -0.281908 0.903793 -0.578292 0.790907 -0.121753 0.392243] Al=[-0.10548 0.178563 -0.0792285 0.108648 0.198934 -0.2157 0.445005 -0.238235]
    7  0.791191    CST airfoil Chord=0.597905 ContLERad=0 LowDegree=7 ThickChord=0.0550194 UpDegree=7 Au=[0.108237 0.386792 -0.241894 0.916146 -0.734111 0.999747 -0.295295 0.607214] Al=[-0.18086 0.318207 -0.381983 0.587287 -0.344799 0.219978 0.194326 -0.17894]
    8  0.935043    CST airfoil Chord=0.490569 ContLERad=0 LowDegree=7 ThickChord=0.0607233 UpDegree=7 Au=[0.0620697 0.429813 -0.273529 0.897865 -0.68729 0.980392 -0.301882 0.61332] Al=[-0.134833 0.0842782 0.0806316 -0.249487 0.672012 -0.717514 0.808953 -0.705023]
    9  1           CST airfoil Chord=0.362338 ContLERad=0 LowDegree=7 ThickChord=0.0607233 UpDegree=7 Au=[0.0620697 0.429813 -0.273529 0.897865 -0.68729 0.980392 -0.301882 0.61332] Al=[-0.134833 0.0842782 0.0806316 -0.249487 0.672012 -0.717514 0.808953 -0.705023]
  Chord along r/R (PCHIP): 0.01: 0.108, 0.100702: 0.169052, 0.14098: 0.21237, 0.181259: 0.24445, 0.221538: 0.263198, 0.261816: 0.26385, 0.302095: 0.249422, 0.342373: 0.232622, 0.382652: 0.219493, 0.42293: 0.206947, 0.463209: 0.19489, 0.503487: 0.183835, 0.543766: 0.173362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
  Twist along r/R (cubic Bezier): 0.01: 13, 0.05125: 18.9654, 0.0925: 20.8598, 0.13375: 20.1842, 0.175: 19.5086, 0.21625: 19.8029, 0.2575: 18.6298, 0.34: 16.2835, 0.4225: 14.6464, 0.505: 13.5374, 0.67: 11.3194, 0.835: 5.29775, 1: 3.86
  Thick along r/R (PCHIP): 0.01: 0.250703, 0.0719314: 0.250703, 0.14098: 0.138441, 0.215783: 0.0639847, 0.359635: 0.0573654, 0.503487: 0.0570133, 0.647339: 0.0575253, 0.791191: 0.0550194, 0.935043: 0.0607233, 1: 0.0607233
  CLI along r/R (cubic Bezier): 0.01: 0, 0.175: 0.888462, 0.34: 0.7, 0.505: 0.7, 0.67: 0.7, 0.835: 0.81875, 1: 0.2
  Axial along r/R (PCHIP): 0.01: -0.030119, 0.100702: -0.0301185, 0.14098: -0.0282487, 0.181259: -0.0258797, 0.221538: -0.024574, 0.261816: -0.0253096, 0.302095: -0.0293343, 0.342373: -0.0321774, 0.382652: -0.0342664, 0.42293: -0.036356, 0.463209: -0.038082, 0.503487: -0.040046, 0.543766: -0.0415235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
  Tangential along r/R (PCHIP): 0.01: 0, 0.100702: 0.0108287, 0.14098: 0.0184593, 0.181259: 0.0253624, 0.221538: 0.0292279, 0.261816: 0.029411, 0.302095: 0.0284116, 0.342373: 0.0259219, 0.382652: 0.0236734, 0.42293: 0.0219225, 0.463209: 0.0196817, 0.503487: 0.0181619, 0.543766: 0.0160719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

Fuselage "FuselageGeom", child of "PropGeom"
  location (X Y Z) -0.582975 0 0, rotation 0 0 0
  bounding box size 0.77735 0.657563 0.657563
  Design: Length=0.7773
  cross sections:
    n  XLocPercent  YLocPercent  ZLocPercent  shape
    0  0            0            0            point
    1  0.232796     0            0            circle Circle_Diameter=0.522269
    2  0.55798      0            0            circle Circle_Diameter=0.65756
    3  1            0            0            circle Circle_Diameter=0.657563
    4  1            0            0            circle Circle_Diameter=0.65756

Mesh "MeshGeom"
  location (X Y Z) 0 0 0, rotation 0 0 0
  bounding box size 0.777324 10.0199 1.55032
  triangle mesh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
