OpenVSP model (file version 5), 2 components.
Geometry view with OpenVSP parameter names; values to 6 digits, angles in degrees, lengths in the model's unit.
Overall bounding box: X_Min=-0.00273078 X_Len=0.00574622 Y_Min=-0.0598617 Y_Len=0.119723 Z_Min=-0.00879695 Z_Len=0.0175939

Propeller "PropGeom"
  location (X Y Z) 0 0 0, rotation 0 0 0
  bounding box size 0.00574622 0.119723 0.0175939
  Design: Diameter=0.11938 NumBlade=2 Beta34=8.29631 UseBeta34Flag=1 Feather=0 Rotate=0 Precone=0 ReverseFlag=0 FoldAngle=0 PropMode=0 AF=90.7508 CLi=0.524046 Chord=0.173298 Solidity=0.110325 ConstructXoC=0.25 FeatherAxisXoC=0.5 FeatherOffsetXoC=0
  cross sections:
    n   RadiusFrac  shape
    0   0.100381    CST airfoil Chord=0.0105672 ContLERad=0 LowDegree=7 ThickChord=0.189261 UpDegree=7 Au=[0.304551 0.211263 0.419865 0.03258 0.830789 -0.362695 1.17288 0.26567] Al=[-0.0747564 -0.334195 0.180116 -0.526921 -0.080489 -0.0540912 -0.700409 -0.327065]
    1   0.167299    CST airfoil Chord=0.0139803 ContLERad=0 LowDegree=7 ThickChord=0.103468 UpDegree=7 Au=[0.244378 0.269575 0.128792 0.330306 0.297387 -0.029746 0.742037 0.0953305] Al=[-0.0566698 -0.0630871 0.0267048 0.0977407 -0.44409 0.568329 -0.717067 -0.00510272]
    2   0.234216    CST airfoil Chord=0.015858 ContLERad=0 LowDegree=7 ThickChord=0.0609958 UpDegree=7 Au=[0.220145 0.347725 -0.115123 0.704169 -0.260919 0.512899 0.189249 0.303474] Al=[-0.0310826 0.127871 -0.0690804 0.344189 -0.293586 0.497646 -0.166656 0.157661]
    3   0.301133    CST airfoil Chord=0.0148564 ContLERad=0 LowDegree=7 ThickChord=0.0601315 UpDegree=7 Au=[0.234851 0.241198 0.13949 0.301418 0.140971 0.197021 0.315936 0.203401] Al=[-0.036488 0.113442 -0.0260582 0.259759 -0.200362 0.337163 -0.0233871 0.0719581]
    4   0.36805     CST airfoil Chord=0.0133301 ContLERad=0 LowDegree=7 ThickChord=0.0575453 UpDegree=7 Au=[0.122691 0.396901 -0.190183 0.704222 -0.272655 0.45858 0.152056 0.243065] Al=[-0.118117 0.196145 -0.192626 0.41998 -0.344569 0.423504 -0.0833204 0.108891]
    5   0.434968    CST airfoil Chord=0.0120667 ContLERad=0 LowDegree=7 ThickChord=0.0584865 UpDegree=7 Au=[0.200709 0.295552 -0.00487418 0.546032 -0.12677 0.382814 0.203067 0.241906] Al=[-0.0624256 0.152693 -0.0994155 0.342652 -0.269486 0.39625 -0.0649267 0.109943]
    6   0.501885    CST airfoil Chord=0.0109281 ContLERad=0 LowDegree=7 ThickChord=0.0582349 UpDegree=7 Au=[0.192094 0.293898 0.0266383 0.443261 -0.0197921 0.326345 0.200971 0.276505] Al=[-0.0866837 0.206552 -0.207978 0.485195 -0.40985 0.496017 -0.111383 0.113569]
    7   0.568802    CST airfoil Chord=0.00992166 ContLERad=0 LowDegree=7 ThickChord=0.058737 UpDegree=7 Au=[0.142027 0.375326 -0.120984 0.654303 -0.25003 0.499918 0.122883 0.311834] Al=[-0.107919 0.217059 -0.223452 0.47493 -0.401614 0.486213 -0.107887 0.103216]
    8   0.635719    CST airfoil Chord=0.00899925 ContLERad=0 LowDegree=7 ThickChord=0.0588957 UpDegree=7 Au=[0.156292 0.378012 -0.0902514 0.591233 -0.185107 0.469875 0.0760669 0.375024] Al=[-0.0690114 0.181801 -0.162558 0.433054 -0.358296 0.473475 -0.112983 0.1386]
    9   0.702637    CST airfoil Chord=0.00812677 ContLERad=0 LowDegree=7 ThickChord=0.0574582 UpDegree=7 Au=[0.127298 0.382553 -0.0796633 0.531147 -0.0937371 0.346546 0.218978 0.289677] Al=[-0.0819994 0.147026 -0.0619478 0.255961 -0.171756 0.340401 -0.0501454 0.0837769]
    10  0.836471    CST airfoil Chord=0.00666662 ContLERad=0 LowDegree=7 ThickChord=0.0599692 UpDegree=7 Au=[0.192846 0.249649 0.186248 0.155368 0.338429 -0.0136172 0.448552 0.256833] Al=[-0.0665041 0.150173 -0.0986703 0.299146 -0.146192 0.227526 0.0095909 -0.0449442]
    11  0.903388    CST airfoil Chord=0.00603652 ContLERad=0 LowDegree=7 ThickChord=0.0617312 UpDegree=7 Au=[0.252431 0.123594 0.432346 -0.135224 0.569698 -0.140592 0.506624 0.186538] Al=[-0.069724 0.188757 -0.155871 0.368525 -0.22739 0.32317 -0.0445936 -0.0860745]
    12  1           CST airfoil Chord=0.00550876 ContLERad=0 LowDegree=7 ThickChord=0.0624373 UpDegree=7 Au=[0.165408 0.287645 0.111488 0.221853 0.275031 0.0449819 0.473617 0.236842] Al=[-0.0959561 0.121553 -0.0611595 0.236172 -0.178007 0.335092 -0.118273 -0.0500524]
  Chord along r/R (PCHIP): 0.100381: 0.177035, 0.167299: 0.234214, 0.234216: 0.265673, 0.301133: 0.248893, 0.36805: 0.223323, 0.434968: 0.202156, 0.501885: 0.18308, 0.568802: 0.16622, 0.635719: 0.150766, 0.702637: 0.13615, 0.836471: 0.111687, 0.903388: 0.101131, 1: 0.0922895
  Twist along r/R (linear): 0.100381: 19.9992, 0.167299: 19.4942, 0.234216: 19.2387, 0.301133: 17.2106, 0.36805: 16.0403, 0.434968: 14.4035, 0.501885: 13.3048, 0.568802: 12.2244, 0.635719: 10.5911, 0.702637: 9.43255, 0.836471: 6.22189, 0.903388: 4.17464, 1: 3.31515
  Thick along r/R (PCHIP): 0.100381: 0.189261, 0.167299: 0.103468, 0.234216: 0.0609958, 0.301133: 0.0601315, 0.36805: 0.0575453, 0.434968: 0.0584865, 0.501885: 0.0582349, 0.568802: 0.058737, 0.635719: 0.0588957, 0.702637: 0.0574582, 0.836471: 0.0599692, 0.903388: 0.0617312, 1: 0.0624373
  CLI along r/R (cubic Bezier): 0.100381: 0, 0.200288: 0.7, 0.300194: 0.7, 0.4001: 0.7, 0.466733: 0.7, 0.533367: 0.7, 0.6: 0.7, 0.733333: 0.7, 0.866667: 0.7, 1: 0.2

Mesh "MeshGeom"
  location (X Y Z) 0 0 0, rotation 0 0 0
  bounding box size 0.00570768 0.119723 0.0175384
  triangle mesh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
